OpenVSP model (file version 5), 1 components.
Geometry view with OpenVSP parameter names; values to 6 digits, angles in degrees, lengths in the model's unit.
Overall bounding box: X_Min=-0.18836 X_Len=0.25915 Y_Min=1 Y_Len=5 Z_Min=-0.562099 Z_Len=0.562098

Wing "RotorFlow_OpenVSP_Blade"
  location (X Y Z) 0 1 0, rotation 0 90 0
  bounding box size 0.25915 5 0.562098
  totals: TotalSpan=5 TotalProjectedSpan=5 TotalChord=1.01012 TotalArea=41.6643 TotalAR=0.600035 MAC=0.485913
  root: chord 0.6, twist 24.7449, NACA 4-series Camber=0 CamberLoc=0.2 ThickChord=0.12
  sections:
    n   Span      Root_Chord  Tip_Chord  Area       Sweep  Sweep_Location  Dihedral  Twist     Twist_Location  tip airfoil
    1   0.227273  0.6         0.588636   22.5       0      0               0         19.9671   0.25            as above
    2   0.227273  0.588636    0.577273   1          0      0               0         16.4477   0.25            as above
    3   0.227273  0.577273    0.565909   1          0      0               0         13.7661   0.25            as above
    4   0.227273  0.565909    0.554545   1          0      0               0         11.6635   0.25            as above
    5   0.227273  0.554545    0.543182   1          0      0               0         9.97477   0.25            as above
    6   0.227273  0.543182    0.531818   1          0      0               0         8.59095   0.25            as above
    7   0.227273  0.531818    0.520455   1          0      0               0         7.43755   0.25            as above
    8   0.227273  0.520455    0.509091   1          0      0               0         6.46218   0.25            as above
    9   0.227273  0.509091    0.497727   1          0      0               0         5.62703   0.25            as above
    10  0.227273  0.497727    0.486364   1          0      0               0         4.90418   0.25            as above
    11  0.227273  0.486364    0.475      1          0      0               0         4.2726    0.25            as above
    12  0.227273  0.475       0.463636   1          0      0               0         3.71616   0.25            as above
    13  0.227273  0.463636    0.452273   1          0      0               0         3.22228   0.25            as above
    14  0.227273  0.452273    0.440909   1          0      0               0         2.78105   0.25            as above
    15  0.227273  0.440909    0.429545   1          0      0               0         2.38451   0.25            as above
    16  0.227273  0.429545    0.418182   1          0      0               0         2.02623   0.25            as above
    17  0.227273  0.418182    0.406818   1          0      0               0         1.70096   0.25            as above
    18  0.227273  0.406818    0.395455   1          0      0               0         1.40435   0.25            as above
    19  0.227273  0.395455    0.384091   1          0      0               0         1.13279   0.25            as above
    20  0.227273  0.384091    0.372727   1          0      0               0         0.88325   0.25            as above
    21  0.227273  0.372727    0.361364   0.0834194  0      0               0         0.653157  0.25            as above
    22  0.227273  0.361364    0.35       0.0808368  0      0               0         0.440332  0.25            as above
